# OpenSim document version 40000
AnalyzeTool TrialAnk_r_rajagopalModel:
  model_file: C:\Users\israe\Documents\GitHub\MetabolicRateWalking\Code and example\Data\Rajagopal2015_passiveCal_hipAbdMoved.osim
  replace_force_set: false
  results_directory: C:\Users\israe\Documents\GitHub\MetabolicRateWalking\Code and example\CalibrationOutcome\MuscleAnalysis
  output_precision: 8
  initial_time: 0
  final_time: 2.99
  solve_for_equilibrium_for_auxiliary_states: false
  maximum_number_of_integrator_steps: 20000
  maximum_integrator_step_size: 1
  minimum_integrator_step_size: 1e-8
  integrator_error_tolerance: 1e-5
  coordinates_file: C:\Users\israe\Documents\GitHub\MetabolicRateWalking\Code and example\Data\TrialAnk_r_rajagopalModel.mot
  lowpass_cutoff_frequency_for_coordinates: -1
  AnalysisSet Analyses:
    MuscleAnalysis: start_time=0 end_time=2.99 step_interval=1 in_degrees=true muscle_list=all
        moment_arm_coordinate_list=ankle_angle_r compute_moments=true
