# OpenSim document version 40000
AnalyzeTool IK_sub1_normal:
  model_file: C:\Users\israe\Dropbox\PhDWork\Simulation\code\PassiveMoments\CodeMaarten\Publication\Data\1_scaledHMK_rajagopal2022_MIF2.osim
  replace_force_set: false
  results_directory: C:\Users\israe\Dropbox\PhDWork\Simulation\code\PassiveMoments\CodeMaarten\Publication\Results\effort_cal\MuscleAnalysis
  output_precision: 8
  initial_time: 0.57
  final_time: 1.75
  solve_for_equilibrium_for_auxiliary_states: false
  maximum_number_of_integrator_steps: 20000
  maximum_integrator_step_size: 1
  minimum_integrator_step_size: 1e-8
  integrator_error_tolerance: 1e-5
  coordinates_file: C:\Users\israe\Dropbox\PhDWork\Simulation\code\PassiveMoments\CodeMaarten\Publication\Data\IK_sub1_normal.mot
  lowpass_cutoff_frequency_for_coordinates: -1
  AnalysisSet Analyses:
    MuscleAnalysis: start_time=0.57 end_time=1.75 step_interval=1 in_degrees=true muscle_list=all
        moment_arm_coordinate_list=(ankle_angle_r knee_angle_r hip_flexion_r hip_adduction_r hip_rotation_r)
        compute_moments=true
